Im(10.622 + 0.213i) = 0.213
Re(10.622 + 0.213i) = 10.622
round(10.622 + 0.213i, 0) = 11
sum((1 + (sin((0 + 7/4) + (0 + k/2))*π + 1i)/(k!*(3 + k)!)), k = 0 .. 9) = 10.622 + 0.21274i
Re(1.004) = 1.004
integral((1 + 1/sqrt(2*x^2 + 0.3)), x = 0.7 .. 1.3) = 1.00413
round(1.004, 0) = 1
Im(1.004) = 0
