# Zadanie 1 | Zadanie 7
M1 := [1, 2, 4, 0, 8, -6; 4, 2, 0, 3, 6, 3; 5, -4, 7, -3, -7, 0; 5, 1, -5, 6, 0, -5]
A := [1, 0, 1; 0, 2, -1; 3, -1, 0]
B := [2, 3, 8; 1, 0, 5; 7, 2, 1]
b := [4; 1; 1]
# Zadanie 2 | Zadanie 8
B^-1 = [-0.102041, 0.132653, 0.153061; 0.346939, -0.55102, -0.0204082; 0.0204082, 0.173469, -0.0306122]
|A| = -7
VectorV := [2; -9; 6; 2; 0; -1]
transpose(A) = [1, 0, 3; 0, 2, -1; 1, -1, 0]
# Zadanie 9
A^3 = [7, -3, 5; -9, 12, -8; 15, -8, 5]
(2*A + B)*(A - B^2) = [-559, -361, -864; -270, -138, -295; -826, -310, -561]
M1*VectorV = [14; -7; 82; -12]
transpose(M1)[:, 2] + VectorV = [7; -13; 13; -1; -7; -1]
# Zadanie 3
# Zadanie 13
MatrixC := A*B
D := det([1, 2, -1; 0, 2, -3; 1, -1, 2])
D = -3
max(MatrixC) = 19
MatrixC = [9, 5, 9; -5, -2, 9; 5, 9, 19]
# Zadanie 4
δ1 := det([4, 0, 1; 1, 2, -1; 1, -1, 0])
δ2 := det([1, 4, 1; 0, 1, -1; 3, 1, 0])
δ3 := det([1, 0, 4; 0, 2, 1; 3, -1, 1])  # Zadanie 14
δ := det([1, 0, 1; 0, 2, -1; 3, -1, 0])
δ = -7
δ1 = -7
δ2 = -14
δ3 = -21
M := [1, 1, -3, 1; -1, 0, 3, -2; 2, 1, 2, -3; 1, 2, 1, 1]
x[1] := δ1/δ
x[1] = 1
x[2] := δ2/δ
x[2] = 2
U := M^-1
x[3] := δ3/δ
x[3] = 3
U = [
    -0.46875, -0.71875, 0.34375, 0.0625;
    0.625, 0.625, -0.125, 0.25;
    -0.40625, -0.15625, 0.03125, 0.1875;
    -0.375, -0.375, -0.125, 0.25
]
U*M = [1, 0, 0, 0; 0, 1, 0, 0; 0, 0, 1, 0; 0, 0, 0, 1]
x := [1; 2; 3]
Proverka
# Zadanie 15
A*x = [4; 1; 1]
# Zadanie 5
T := [1.16, 0.83, -0.66; 0.45, -0.54, 0.83; 0.32, 0.28, 1.06]
A = [1, 0, 1; 0, 2, -1; 3, -1, 0]
ρ[2] := det([1, 0; 0, 2]) + det([2, -1; -1, 0]) + det([1, 1; 3, 0])
ρ[3] := det([1, 0, 1; 0, 2, -1; 3, -1, 0])
T^-1 = [0.61612, 0.815012, -0.254548; 0.161839, -1.10301, 0.964449; -0.228749, 0.045321, 0.765481]
ρ[1] := 1 + 0 + 1 + 0 + 2 - 1 + 3 - 1 + 0
ρ[2] = -2
ρ[3] = -7
T^-1*2.5 = [1.5403, 2.03753, -0.636369; 0.404597, -2.75754, 2.41112; -0.571871, 0.113302, 1.9137]
ρ[1] = 5
λ := -4
ρ = [0; 5; -2; -7]
p(λ) := λ^3 - ρ[1]*λ^2 + ρ[2]*λ - ρ[3]
λ := -4, -3.5 .. 4
p(λ) = [-129; -90.125; -59; -34.875; -17; -4.625; 3; 6.625; 7; 4.875; 1; -3.875; -9; -13.625; -17; -18.375; -17]
# Zadanie 16
A := [1, 2, -1; 0, 2, -3; 1, -1, 2]
B := [2, 1, 3; 1, 0, 1; 1, 3, 1]
(3*A + B)*(2*A - B) = [-7, 43, -74; -14, 67, -71; 7, -23, 1]
# Zadanie 17
S := [1, 3, -1; 0, 1, -2; 1, 1, 0]
S2 := [13, -4, 6; 2, -4, 2; -2, 5, 5]
# Zadanie 10
|S| = -3
S^-1 = [-0.666667, 0.333333, 1.66667; 0.666667, -0.333333, -0.666667; 0.333333, -0.666667, -0.333333]
i := 0 .. 3
j := 0 .. 5
X := S^-1*S2
M2[i, j] := π*cos(i)*cos(i) + sum(sin(j)*sin(j), j = 0 .. i)
X = [-11.3333, 9.66667, 5; 9.33333, -4.66667, 0; 3.66667, -0.333333, -1]
M2 = [
    3.14159, 3.14159, 3.14159, 3.14159, 3.14159, 3.14159;
    1.62519, 1.62519, 1.62519, 1.62519, 1.62519, 1.62519;
    2.07895, 2.07895, 2.07895, 2.07895, 2.07895, 2.07895;
    4.63384, 4.63384, 4.63384, 4.63384, 4.63384, 4.63384
]  # Proverka
S*X = [13, -4, 6; 2, -4, 2; -2, 5, 5]
# Zadanie 11
M2[:, 1] = [3.14159; 1.62519; 2.07895; 4.63384]
# Zadanie 18
transpose(M2)[:, 2] = [2.07895; 2.07895; 2.07895; 2.07895; 2.07895; 2.07895]
AB := augment(A, B)
AB = [1, 2, -1, 2, 1, 3; 0, 2, -3, 1, 0, 1; 1, -1, 2, 1, 3, 1]
# Zadanie 12
M1 + M2 = [
    4.14159, 5.14159, 7.14159, 3.14159, 11.1416, -2.85841;
    5.62519, 3.62519, 1.62519, 4.62519, 7.62519, 4.62519;
    7.07895, -1.92105, 9.07895, -0.921049, -4.92105, 2.07895;
    9.63384, 5.63384, -0.366162, 10.6338, 4.63384, -0.366162
]  # Zadanie 19
M1 := [2, 3, 4, 5, 9, 1; 12, 6, 4, 3, 3, 1; 0, 3, 1, 9, 3, 3]
# Zadanie 6
ABM1 := stack(AB, M1)
M[1]
x_1 := 2
y_1 := 1
M[2]
ABM1 = [
    1, 2, -1, 2, 1, 3;
    0, 2, -3, 1, 0, 1;
    1, -1, 2, 1, 3, 1;
    2, 3, 4, 5, 9, 1;
    12, 6, 4, 3, 3, 1;
    0, 3, 1, 9, 3, 3
]
x_2 := 1
y_2 := 1
M[3]
# Zadanie 20
x_3 := -1
y_3 := -1
f(x1, y1, x2, y2, x3, y3, xx, yy) := det([xx^2 + yy^2, xx, yy, 1; x1^2 + y1^2, x1, y1, 1; x2^2 + y2^2, x2, y2, 1; x3^2 + y3^2, x3, y3, 1]) == 0
PM := submatrix(ABM1, 1, 3, 2, 5)
M
x := -2
y := -1
PM = [-3, 1, 0, 1; 2, 1, 3, 1; 4, 5, 9, 1]
f(2, 1, 1, 1, -1, -1, -1, -1) = 1
# Zadanie 21
csort(PM, 0) = [-3, 1, 0, 1; 2, 1, 3, 1; 4, 5, 9, 1]
csort(PM, 1) = [2, 1, 3, 1; -3, 1, 0, 1; 4, 5, 9, 1]
csort(PM, 2) = [-3, 1, 0, 1; 2, 1, 3, 1; 4, 5, 9, 1]
rsort(PM, 0) = [1, 0, 1, -3; 1, 3, 1, 2; 1, 9, 5, 4]
rsort(PM, 1) = [1, 0, 1, -3; 1, 3, 1, 2; 1, 9, 5, 4]
