# Zadanie 1
x := -10 .. 15
f(x) := x*2^x + 2*x
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x := -10 .. 10
f(x) := 15*ln(2*x + 13)
g(x) := 1 - 2*x
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x := -3 .. 3
t := -1 .. 1
α := -4 .. 4
f(x) := 2*x - ln(x) + 1.2
f(t) := t - cos(t)
f(α) := α + 2*α^2
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# Zadanie 4
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# Zadanie 5
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# 6 ЗАДАНИЕ
i := 0 .. 20
w(x, y) := sin(x^2 + y^2)
j := 0 .. 20
x[i] := -5*0.5*i
y[j] := -5*0.5*j
A[i, j] := w(x[i], y[j])
# [component: inputs A]
q(x, y) := sin(x + y^2) + cos(x^2 + y)
# [component: inputs q]
9.
x := -10 .. 10
f(x) := x^2
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10.
u(x, y) := e^x + y
# [component: inputs u]
s(x, y) := e^(x + y)
u(x, y) := tan(x + y)
# [component: inputs u, s]
g(x, y) := e^(x + y)
11.
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a := 2 .. 10
f(a) := cos(FRAME*a)
x := -1 .. 1
f(x) := cos(x + FRAME*π) + cos(x - FRAME*π)
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x := -1 .. 1
