x := -2*π .. 2*π
# 1.
f(x) := 0.5^x - (x - 2)^2
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root(f(x), x) = [-6; -6; -6; 1.38019; 1.38019; 1.38019; 1.38019; 1.38019; 1.38019; 2.43067; 2.43067; 2.43067; 2.43067]
# 3.
x := 0
y := 0
Given
x^2 + y^2 == 1
sin(x + y) - 1.1*x == 0.1
[x; y] := Find(x, y)
[x; y] = [0.804703; 0.593678]
