# lab 5
1
a := integral(sqrt(1 + t^2), t = 0 .. 2)
x := 1
d/dx(a) = 0
N := 10
sum(n, n = 1 .. N) = 55
((3 - 2i)/(1 + 3i))^2 + (14/(9 + 5i))^3 = -0.995589 - 1.85127i
2
(b*nthroot(a, 3) + a^2*nthroot(b, 3)*nthroot(b^3, 8)^2*sqrt(a*nthroot(b, 3)/(b*nthroot(a, 3))))/(a*b*nthroot(a, 3)*(a^(1/4) + b^(1/4))*nthroot(b^3, 8)^2)
((a*nthroot(b, 3)/(b*nthroot(a, 3)))^(3/2) + (sqrt(a)/(a*nthroot(b^3, 8)))^2)/(a^(1/4) + b^(1/4))
1 - (a^3 + 5*a^2 - 8)/((a + 2)*(a + a*sqrt(a^2 - 1) - 2*sqrt(a^2 - 1) + a^2 - 2))
(a^2 - 3*a^2 + 4 + (a^2 - 4)*sqrt(a^2 - 1))/(a^3 + 3*a^2 - 4 + (a^2 - 4)*sqrt(a^2 - 1))
sum(1/(n*(n + 1)), n = 1 .. ∞)
1
xx := 5
integral(sin(t)/t, t = 0 .. xx)
Si(xx)
