# lab 6
1
sum(n) :=
    s ← 0
    for i ∈ 1 .. n
        s ← s + i^2
sum(5) = 55
2
Area(a, b, c) :=
    p ← (a + b + c)/2
    s ← sqrt(p*(p - a)*(p - b)*(p - c))
    return s
Area(3, 4, 5) = 6
Area(5, 12, 13) = 30
