lab7
1
s(x) := 2*x + 2.5
f(x) := x^2 - 2*x + 1
S := [s(-5), s(-4), s(-3), s(-2), s(-1), s(0), s(1), s(2), s(3), s(4), s(5), s(6), s(7)]
S = [-7.5, -5.5, -3.5, -1.5, 0.5, 2.5, 4.5, 6.5, 8.5, 10.5, 12.5, 14.5, 16.5]
F := [f(-5), f(-4), f(-3), f(-2), f(-1), f(0), f(1), f(2), f(3), f(4), f(5), f(6), f(7)]
F = [36, 25, 16, 9, 4, 1, 0, 1, 4, 9, 16, 25, 36]
WRITEPRN("ss.txt") := S
WRITEPRN("ff.txt") := F
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SSS := READPRN("ss.txt")
SSS = [-7.5, -5.5, -3.5, -1.5, 0.5, 2.5, 4.5, 6.5, 8.5, 10.5, 12.5, 14.5, 16.5]
FFF := READPRN("ff.txt")
FFF = [36, 25, 16, 9, 4, 1, 0, 1, 4, 9, 16, 25, 36]
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