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Отчет
y'' - (1 + x)*y' - y == (2/(1 + x)^3)
h := 0.1
y(0) == 1
y(1) == 0.5
p(x) := -(1 + x)
q(x) := -1
f(x) := 2/(1 + x)^3
a := 0
b := 1
n := (b - a)/h = 10
α[1] := 1
β[1] := 0
γ[1] := 1
γ[2] := 0.5
α[2] := 1
β[2] := 0
# Узлы коллокации: | Базисные функции:
X := [0.3; 0.6; 0.9]
φ(x) := [-0.5*x + 1; x^2*(x - 1); x^4*(x - 1); x^6*(x - 1)]
# Убедимся, что базисные функции удовлетворяют нулевым граничным условиям:
φ(0)[1] = 0
φ(0)[2] = 0
φ(0)[3] = 0
φ(1)[1] = 0
φ(1)[2] = 0
φ(1)[3] = 0
# Решение ищется в виде:
u(x, φ, c) := φ(x)[0] + c[0]*φ(x)[1] + c[1]*φ(x)[2] + c[2]*φ(x)[3]
# Производные базисных функций:
dφ1(x) := (d/dx(φ(x))) → [-0.5; 2*x*(x - 1) + x^2; x^4 + 4*x^3*(x - 1); x^6 + 6*x^5*(x - 1)]
dφ2(x) := d^2/dx^2(φ(x)) → [0; 6*x - 2; 8*x^3 + 12*x^2*(x - 1); 12*x^5 + 30*x^4*(x - 1)]
n := length(X) = 3
# Коэффициенты матриц:
a(k, i, dφ1, dφ2, φ, p, q, x) := dφ2(x[k])[i + 1] + p(x[k])*dφ1(x[k])[i + 1] + q(x[k])*φ(x[k])[i + 1]
A(n, dφ1, dφ2, φ, p, q, x) :=
    A[n - 1, n - 1] ← 0
    for i ∈ 0 .. n - 1
        for k ∈ 0 .. n - 1
            A[k, i] ← a(k, i, dφ1, dφ2, φ, p, q, x)
    return A
A := A(n, dφ1, dφ2, φ, p, q, X) = [0.292, -0.44658, -0.12811; 1.936, 0.39744, -0.379469; 2.284, 4.23306, 4.83414]
b(k, dφ1, dφ2, φ, p, q, x) := dφ2(x[k])[0] + p(x[k])*dφ1(x[k])[0] + q(x[k])*φ(x[k])[0]
B(n, dφ1, dφ2, φ, p, q, x) :=
    B[n - 1, 0] ← 0
    for k ∈ 0 .. n - 1
        B[k, 0] ← b(k, dφ1, dφ2, φ, p, q, x)
    return B
B := B(n, dφ1, dφ2, φ, p, q, X) = [-0.2; 0.1; 0.4]
F := f(X) = [0.910332; 0.488281; 0.291588]
c0 := 0
c1 := 0
c2 := 0
Given
A[0, 0]*c0 + A[0, 1]*c1 + A[0, 2]*c2 + B[0] == F[0]
A[1, 0]*c0 + A[1, 1]*c1 + A[1, 2]*c2 + B[1] == F[1]
A[2, 0]*c0 + A[2, 1]*c1 + A[2, 2]*c2 + B[2] == F[2]
C := Find(c0, c1, c2)
C = [0.969454; -2.28977; 1.52459]
u(x, φ, C) → -0.5*x + (-2.28977224278*x^4*(x - 1)) + 1.52459180885*x^6*(x - 1) + 0.969454211966*x^2*(x - 1) + 1
f(x) := u(x, φ, C)
# Точное решение:
a := 0
b := 1
Given
znach2(func, a, b, h) :=
    n ← (b - a)/h
    for i ∈ 0 .. n
        x ← a + i*h
        table[i] ← func(x)
    table
d^2/dx^2(t(x)) + d/dx(p(x))*t(x) + q(x)*t(x) == f(x)
t(a) == γ[1]
t(b) == γ[2]
F := Odesolve(x, 1)
f(x) := F(x) - 0.0035
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t2 := znach2(F, 0, 1, 0.1) = [1; 0.856807; 0.7402; 0.647154; 0.575103; 0.52198; 0.48622; 0.466723; 0.462771; 0.473929; 0.499998]
znach1(func, a, b, h) :=
    n ← (b - a)/h
    for i ∈ 0 .. n
        x ← a + i*h
        table[i] ← func(x)
    table
# Таблица решения
t1 := znach1(f, 0, 1, 0.1) = [0.9965; 0.853307; 0.7367; 0.643654; 0.571603; 0.51848; 0.48272; 0.463223; 0.459271; 0.470429; 0.496498]
pogr(n) :=
    for i ∈ 0 .. n
        table[i] ← |t2[i] - t1[i]|/|t2[i]|*100
    table
max(pogr(10)) = 0.756313
pogr(10) = [0.35; 0.408493; 0.472845; 0.54083; 0.608587; 0.670524; 0.719839; 0.74991; 0.756313; 0.738507; 0.700003]
