# Метод наименьших квадратов
# Задание:
#
# По заданной таблице значений функции построить точечный график и методом наименьших квадратов найти несколько приближающих аналитических функций. Сравнить качество полученных приближений. Совместить в одной плоскости графики исходной и найденной функций.
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X := [-3; -2; -1; 0; 1; 2]
Y := [-2.6; -0.3; -2; -2.3; -1.5; 0.7]
n := 6
# Строим точечный график
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# Полагаем что x и y связаны линейной зависимостью f1(x)=ax+b
# Находим частные производные
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# И составляем систему
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# преобразуем систему к виду
# Для поиска параметров a b1  строим таблицу вида
Tab(x, y) :=
    for i ∈ 0 .. n - 1
        P[i, 0] ← i + 1
        P[i, 1] ← x[i]
        P[i, 2] ← y[i]
        P[i, 3] ← x[i]^2
        P[i, 4] ← x[i]*y[i]
    for i ∈ 1 .. 4
        P[n, i] ← sum(P[j, i], j = 0 .. n - 1)
    P
Tabl2 := Tab(X, Y) = [
    1, -3, -2.6, 9, 7.8;
    2, -2, -0.3, 4, 0.6;
    3, -1, -2, 1, 2;
    4, 0, -2.3, 0, 0;
    5, 1, -1.5, 1, -1.5;
    6, 2, 0.7, 4, 1.4;
    0, -3, -8, 19, 10.3
]
# По данным таблицы сформируем систему уравнений
a := 1
b1 := 1
Given
Tabl2[6, 3]*a + Tabl2[6, 1]*b1 == Tabl2[6, 4]
Tabl2[6, 1]*a + n*b1 == Tabl2[6, 2]
Res1 := Find(a, b1) = [0.36; -1.15333]
# Решив систему
# Строим график приближения для
f1(x) := Res1[0]*x + Res1[1]
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# Преобразуем систему к виду
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# Cоставляем таблицу
Tabl3(x, y) :=
    for i ∈ 0 .. n - 1
        P[i, 0] ← i + 1
        P[i, 1] ← x[i]
        P[i, 2] ← y[i]
        P[i, 3] ← x[i]^2
        P[i, 4] ← x[i]^3
        P[i, 5] ← x[i]^4
        P[i, 6] ← x[i]*y[i]
        P[i, 7] ← x[i]^2*y[i]
    for i ∈ 1 .. 7
        P[n, i] ← sum(P[j, i], j = 0 .. n - 1)
    P
TA := Tabl3(X, Y) = [
    1, -3, -2.6, 9, -27, 81, 7.8, -23.4;
    2, -2, -0.3, 4, -8, 16, 0.6, -1.2;
    3, -1, -2, 1, -1, 1, 2, -2;
    4, 0, -2.3, 0, 0, 0, 0, 0;
    5, 1, -1.5, 1, 1, 1, -1.5, -1.5;
    6, 2, 0.7, 4, 8, 16, 1.4, 2.8;
    0, -3, -8, 19, -27, 115, 10.3, -25.3
]
# По данным таблицы сформируем систему уравнений
a := 0
b1 := 0
c := 0
Given
TA[6, 5]*a + TA[6, 4]*b1 + TA[6, 3]*c == TA[6, 7]
TA[6, 4]*a + TA[6, 3]*b1 + TA[6, 1]*c == TA[6, 6]
TA[6, 3]*a + TA[6, 1]*b1 + n*c == TA[6, 2]
Res2 := Find(a, b1, c) = [0.169643; 0.529643; -1.60571]
# Решив систему получим:
a := Res2[0]
b1 := Res2[1]
c := Res2[2]
# Строим график приближения
f2(x) := a*x^2 + b1*x + c
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14^3 = 2744
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# Преобразуем систему к виду
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# Для поиска параметров a,b,c,d строим таблицу следующего вида
TableValues(x, y) :=
    for i ∈ 0 .. n - 1
        P[i, 0] ← i + 1
        P[i, 1] ← x[i]
        P[i, 2] ← y[i]
        P[i, 3] ← x[i]^2
        P[i, 4] ← x[i]^3
        P[i, 5] ← x[i]^4
        P[i, 6] ← x[i]^5
        P[i, 7] ← x[i]^6
        P[i, 8] ← x[i]*y[i]
        P[i, 9] ← x[i]^2*y[i]
        P[i, 10] ← x[i]^3*y[i]
    for i ∈ 1 .. 10
        P[n, i] ← sum(P[j, i], j = 0 .. n - 1)
    P
Values := TableValues(X, Y)
Values = [
    1, -3, -2.6, 9, -27, 81, -243, 729, 7.8, -23.4, 70.2;
    2, -2, -0.3, 4, -8, 16, -32, 64, 0.6, -1.2, 2.4;
    3, -1, -2, 1, -1, 1, -1, 1, 2, -2, 2;
    4, 0, -2.3, 0, 0, 0, 0, 0, 0, 0, 0;
    5, 1, -1.5, 1, 1, 1, 1, 1, -1.5, -1.5, -1.5;
    6, 2, 0.7, 4, 8, 16, 32, 64, 1.4, 2.8, 5.6;
    0, -3, -8, 19, -27, 115, -243, 859, 10.3, -25.3, 78.7
]
# По данным таблицы сформируем систему уравнений
a_val := 1
b_val := 1
c_val := 1
d := 1
Given
Values[6, 7]*a_val + Values[6, 6]*b_val + Values[6, 5]*c_val + Values[6, 4]*d == Values[6, 10]
Values[6, 6]*a_val + Values[6, 5]*b_val + Values[6, 4]*c_val + Values[6, 3]*d == Values[6, 9]
Values[6, 5]*a_val + Values[6, 4]*b_val + Values[6, 3]*c_val + Values[6, 1]*d == Values[6, 8]
Values[6, 4]*a_val + Values[6, 3]*b_val + Values[6, 1]*c_val + n*d == Values[6, 2]
Values[6, 7] = 859
R3 := Find(a_val, b_val, c_val, d) = [0.241667; 0.532143; -0.509524; -2.18571]
a_val := R3[0]
b_val := R3[1]
c_val := R3[2]
d := R3[3]
f3(x) := a_val*x^3 + b_val*x^2 + c_val*x + d
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Q(f, y, x) := sum((y[i] - f(x[i]))^2, i = 0 .. n - 1)
Q(f1, Y, X) = 5.94533
Q(f2, Y, X) = 4.87093
Q(f3, Y, X) = 1.08643
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f3(x) := a_val*x^3 + b_val*x^2 + c_val*x + d
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