# Мащёнский Дмитрий | Вариант 7
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# Задание 1
# Даны интеграл и первообразная функция:
g(x) := 3/(x + 3) + ln(x + 3)
integral(x/(x + 3)^2, x = 0 .. 2)
# Запишем подинтегральную функцию и концы отрезка:
B := integral(x/(x + 3)^2, x = 0 .. 2) = 0.110826
f(x) := x/(x + 3)^2
a := 0
b := 2
# Возьмём количество разбиений:
n := 10
# Тогда шаг равен
h := |b - a|/n
h = 0.2
# Формулы прямоугольников
# Найдем узлы сетки и значения функции в них
Table1(f, h, n) :=
    for i ∈ 0 .. n
        P[0, i] ← a + i*h
        P[1, i] ← f(P[0, i])
        P[2, i] ← f(P[0, i] - h/2)
    P
M1 := Table1(f, h, n) = [
    0, 0.2, 0.4, 0.6, 0.8, 1, 1.2, 1.4, 1.6, 1.8, 2;
    0, 0.0195312, 0.0346021, 0.0462963, 0.0554017, 0.0625, 0.0680272, 0.072314, 0.0756144, 0.078125, 0.08;
    -0.0118906, 0.0104058, 0.0275482, 0.0408163, 0.0511322, 0.0591716, 0.0654372, 0.0703083, 0.0740741, 0.0769579, 0.0791337
]
# Запишем формулы для нахождения левых, правых и средних прямоугольников
# Для левых прямоугольников
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Left(a, b, n, h, f) :=
    I ← 0
    for i ∈ 0 .. n - 1
        I ← I + f(a + h*i)
    I*h
dec[0] := Left(a, b, n, h, f) = 0.102482
dec[0] := h*sum(M1[1, i], i = 0 .. n - 1) = 0.102482
# Для правых прямоугольников
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Right(a, b, n, h, f) :=
    I ← 0
    for i ∈ 1 .. n
        I ← I + f(a + h*i)
    I*h
dec[1] := Right(a, b, n, h, f) = 0.118482
dec[1] := h*sum(M1[1, i], i = 1 .. n) = 0.118482
# Для средних прямоугольников
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mind(a, b, n, h, f) :=
    I ← 0
    for i ∈ 1 .. n
        I ← I + f(a + h*i - h/2)
    I*h
dec[2] := mind(a, b, n, h, f) = 0.110997
dec[2] := h*sum(M1[2, i], i = 1 .. n) = 0.110997
# Формула трапеции
# Применим формулу трапеции для нахождения определенного интеграла
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trap(a, b, n, h, f) :=
    I ← 0
    for i ∈ 1 .. n - 1
        I ← I + f(a + h*i)
    (I + (f(a) + f(b))/2)*h
dec2 := trap(a, b, n, h, f) = 0.110482
dec2 := (M1[1, n] + M1[1, 0] + 2*sum(M1[1, i], i = 1 .. n - 1))*(b - a)/(2*n) = 0.110482
# Формула Симпсона
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sim(a, b, n, h, f) :=
    d ← 0
    for i ∈ 0 .. n - 1
        xi1 ← a + h*i
        xi ← xi1 + h
        d ← d + f(xi1) + 4*f((xi1 + xi)/2) + f(xi)
    d*h/6
dec3 := sim(a, b, n, h, f) = 0.110826
dec3 := h/6*sum(M1[1, i - 1] + 4*M1[2, i] + M1[1, i], i = 1 .. n) = 0.110826
# Задание 2
g(x) := sin(2*x)/4 - x*cos(2*x)/2
I := g(b) - g(a) = 0.464443
Δx(a, b) := |a - b|
δx(Δx, a) := Δx*100/|a|
# Вычисляем погрешности метода прямоугольника
Δres1 := Δx(I, dec[0]) = 0.361961
δx(Δres1, I) = 77.9343
Δres2 := Δx(I, dec[1]) = 0.345961
δx(Δres2, I) = 74.4894
# Вычисляем погрешность для метода Симпсона
Δres3 := Δx(I, dec[2]) = 0.353446
δx(Δres3, I) = 76.101
# Вычисляем погрешность для метода трапеций
Δtr2 := Δx(I, dec2) = 0.353961
δx(Δtr2, I) = 76.2119
Δsim3 := Δx(I, dec3) = 0.353617
δx(Δsim3, I) = 76.138
# Задание 3
f1(x) := d^2/dx^2(x*sin(2*x)) → 4*cos(2*x) - 4*x*sin(2*x)
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# Метод прямоугольников:
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h1 := |b - a|/13
I := g(b) - g(a) = 0.464443
|f1(0)| = 4  # максимальное значение
M := |f1(0)| = 4
h1 = 0.153846
P := mind(a, b, 13, h1, f) = 0.110927
(b - a)^3/(24*n^2)*M ≤ 1/2*10^-3
ΔX := |I - P| = 0.353516
δx1 := ΔX*100/|I| = 76.1161
Given
(b - a)^3/(24*n^2)*M - 1/2*10^-3 == 0
n1 := Find(n) = 51.6398
# Метод трапеций:
# Находим по формуле:
h2 := |b - a|/18
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P1 := trap(a, b, 18, h2, f) = 0.11072
I = 0.464443
Given
(b - a)^3/(12*n^2)*M ≤ 1/2*10^-3
ΔX := |I - P1| = 0.353723
δx1 := ΔX*100/|I| = 76.1608
n2 := Find(n) = 73.0297
# Метод Симпсона
f(x) := x*sin(2*x)
f2(x) := d^4/dx^4(x*sin(2*x)) → 16*x*sin(2*x) - 32*cos(2*x)
I := g(b) - g(a) = 0.464443
h2 := |b - a|/10
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P1 := sim(a, b, 10, h2, f) = 0.464454
ΔX := |I - P1| = 1.09236e-5
δx1 := ΔX*100/|I| = 0.00235197
|f2(π/4)| = 12.5664  # максимальное значение
M1 := |f2(π/4)| = 12.5664
Given
(b - a)^5/(180*n^4)*M1 ≤ 1/2*10^-3
n3 := Find(n) = 10
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# Даны интеграл и первообразная функция:
a := 0
b := 2
A := integral(x/(x + 3)^2, x = 0 .. 2)
t(x) := ((b - a)/2*x + (b + a)/2)
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# Возьмем количество разбиений
amount := 6
X := [-0.93246951, -0.6612093, -0.23861918, 0.23861918, 0.6612093, 0.93246951]
C_Vals := [0.171324492, 0.36076157, 0.46793, 0.46793, 0.36076157, 0.171324492]
I := (b - a)/2*sum(C_Vals[0, k]*(t(X[0, k])/(3 + t(X[0, k]))^2), k = 0 .. amount - 1) = 0.110828
A = 0.110826  # истинное значение
погрешность
δx := |A - I|*100/|I| = 0.00178103
