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f(x) := 1/(sqrt(x)*(1 + x))
a := 0
b := 1
δ := 1*10^-6
WithoutE := integral(f(x), x = a .. b) = 1.5708
WithE := integral(f(x), x = a + δ .. b) = 1.5708
# Метод Симпсона
n := 13000
a := δ
h := (b - a)/n = 7.6923e-5
sim(a, b, n, h, f) :=
    d ← 0
    for i ∈ 0 .. n - 1
        xi1 ← a + h*i
        xi ← xi1 + h
        d ← d + f(xi1) + 4*f((xi1 + xi)/2) + f(xi)
    d*h/6
Simpson := sim(a, b, n, h, f) = 1.57558
Погрешность
ΔX := |WithoutE - Simpson| = 0.00478559
δx := ΔX*100/|WithoutE| = 0.30466
f(x) := log(sin(x))
a := 0
b := π/2
δ := 1*10^-3
WithE := integral(f(x), x = a + δ .. b) = -0.469423
WithoutE := integral(f(x), x = a .. b) = -0.472857
# Метод Симпсона
n := 13000
a := δ
h := (b - a)/n = 0.000120754
sim(a, b, n, h, f) :=
    d ← 0
    for i ∈ 0 .. n - 1
        xi1 ← a + h*i
        xi ← xi1 + h
        d ← d + f(xi1) + 4*f((xi1 + xi)/2) + f(xi)
    d*h/6
Simpson := sim(a, b, n, h, f) = -0.469423
Погрешность
ΔX := |WithoutE - Simpson| = 0.00343429
δx := ΔX*100/|WithoutE| = 0.726286
