# Лабараторная работа №6
# Вариант 1
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# 1. | Метод Эйлера
f(x, y) := 2*y/x + x
y[0] := 0
a := 1
b := 1.5
h := 0.1
n := (b - a)/h = 5
x :=
    for i ∈ 0 .. n
        x[i] ← a + h*i
    x
x = [1; 1.1; 1.2; 1.3; 1.4; 1.5]
# Находим метод Эйлера:
y :=
    for i ∈ 0 .. n - 1
        y[i + 1] ← y[i] + h*f(x[i], y[i])
    y
y = [0; 0.1; 0.228182; 0.386212; 0.575629; 0.797862]
# Точное значение
result := rkfixed(y[0], a, b, n, f) = [1, 0; 1.1, 0.115323; 1.2, 0.262538; 1.3, 0.443387; 1.4, 0.659475; 1.5, 0.912282]
Погрешность
Δ :=
    for i ∈ 1 .. n
        Δ[i] ← |((y[i] - result[i, 1])/y[i])|*100
    Δ
Δ = [0; 15.3226; 15.0563; 14.8041; 14.5658; 14.3409]
max(Δ) = 15.3226
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# 2. | Метод Рунге-Кутта
f(x, y) := 2*y/x + x
y[0] := 0
a := 1
b := 1.5
h := 0.1
n := (b - a)/h = 5
x :=
    for i ∈ 0 .. n
        x[i] ← a + h*i
    x
x = [1; 1.1; 1.2; 1.3; 1.4; 1.5]
# Точное значение
result := rkfixed(y[0], a, b, n, f) = [1, 0; 1.1, 0.115323; 1.2, 0.262538; 1.3, 0.443387; 1.4, 0.659475; 1.5, 0.912282]
# Метод Рунге-Кутта
Kut :=
    for i ∈ 0 .. n - 1
        K1[i] ← f(x[i], y[i])
        K2[i] ← f(x[i] + h/2, y[i] + h*K1[i]/2)
        K3[i] ← f(x[i] + h/2, y[i] + h*K2[i]/2)
        K4[i] ← f(x[i] + h, y[i] + h*K3[i])
        y[i + 1] ← y[i] + h*(K1[i] + 2*K2[i] + 2*K3[i] + K4[i])/6
    y
Kut = [0; 0.115323; 0.262538; 0.443387; 0.659475; 0.912282]
Погрешность
Δ :=
    for i ∈ 1 .. n
        Δ[i] ← |(Kut[i] - result[i, 1])/Kut[i]|*100
    Δ
Δ = [0; 1.20339e-14; 0; 0; 1.6835e-14; 1.21697e-14]
max(Δ) = 1.6835e-14
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