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a := 0
b := 1
h := 0.1
y1(x, y, z) := 1 - 1/z
n := |b - a|/h = 10
z1(x, y, z) := 1/(y - x)
X[0] := a
Y[0] := -1
Z[0] := 1
# Будем считать точным значением
nt := [Y[0]; Z[0]]
func(x, u) := [1 - 1/u[1]; 1/(u[0] - x)]
result := rkfixed(nt, a, b, n, func) = [
    0, -1, 1;
    0.1, -1.00517, 0.904838;
    0.2, -1.0214, 0.818731;
    0.3, -1.04986, 0.740819;
    0.4, -1.09182, 0.670321;
    0.5, -1.14872, 0.606532;
    0.6, -1.22212, 0.548813;
    0.7, -1.31375, 0.496586;
    0.8, -1.42554, 0.44933;
    0.9, -1.5596, 0.406571;
    1, -1.71827, 0.36788
]
Eiler :=
    i ← 0
    R[0, 0] ← X[0]
    R[0, 1] ← Y[0]
    R[0, 2] ← Z[0]
    for i ∈ 0 .. n - 1
        R[i + 1, 0] ← R[i, 0] + h
        R[i + 1, 1] ← R[i, 1] + h*y1(R[i, 0], R[i, 1], R[i, 2])
        R[i + 1, 2] ← R[i, 2] + h*z1(R[i, 0], R[i, 1], R[i, 2])
        i ← i + 1
    return R
Eiler = [
    0, -1, 1;
    0.1, -1, 0.9;
    0.2, -1.01111, 0.809091;
    0.3, -1.03471, 0.726522;
    0.4, -1.07235, 0.651599;
    0.5, -1.12582, 0.583681;
    0.6, -1.19714, 0.522173;
    0.7, -1.28865, 0.466529;
    0.8, -1.403, 0.416244;
    0.9, -1.54324, 0.370851;
    1, -1.71289, 0.329922
]
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Погрешность
Δ :=
    for i ∈ 0 .. n
        Δ[i, 0] ← |(Eiler[i, 1] - result[i, 1])/result[i, 1]|*100
        Δ[i, 1] ← |(Eiler[i, 2] - result[i, 2])/result[i, 2]|*100
    Δ
Δ = [
    0, 0;
    0.514399, 0.534646;
    1.00753, 1.17747;
    1.44315, 1.92986;
    1.78365, 2.79292;
    1.99367, 3.76748;
    2.04332, 4.85403;
    1.91036, 6.05274;
    1.58085, 7.36344;
    1.04853, 8.78555;
    0.313112, 10.3182
]
max(Δ) = 10.3182
2.
rungeKut :=
    i ← 0
    R[0, 0] ← X[0]
    R[0, 1] ← Y[0]
    R[0, 2] ← Z[0]
    for i ∈ 0 .. n - 1
        K1 ← y1(R[i, 0], R[i, 1], R[i, 2])
        L1 ← z1(R[i, 0], R[i, 1], R[i, 2])
        K2 ← y1(R[i, 0] + h/2, R[i, 1] + h/2*K1, R[i, 2] + h/2*L1)
        L2 ← z1(R[i, 0] + h/2, R[i, 1] + h/2*K1, R[i, 2] + h/2*L1)
        K3 ← y1(R[i, 0] + h/2, R[i, 1] + h/2*K2, R[i, 2] + h/2*L2)
        L3 ← z1(R[i, 0] + h/2, R[i, 1] + h/2*K2, R[i, 2] + h/2*L2)
        K4 ← y1(R[i, 0] + h, R[i, 1] + h*K3, R[i, 2] + h*L3)
        L4 ← z1(R[i, 0] + h, R[i, 1] + h*K3, R[i, 2] + h*L3)
        R[i + 1, 0] ← R[i, 0] + h
        R[i + 1, 1] ← R[i, 1] + h/6*(K1 + 2*K2 + 2*K3 + K4)
        R[i + 1, 2] ← R[i, 2] + h/6*(L1 + 2*L2 + 2*L3 + L4)
        i ← i + 1
    return R
rungeKut = [
    0, -1, 1;
    0.1, -1.00517, 0.904838;
    0.2, -1.0214, 0.818731;
    0.3, -1.04986, 0.740819;
    0.4, -1.09182, 0.670321;
    0.5, -1.14872, 0.606532;
    0.6, -1.22212, 0.548813;
    0.7, -1.31375, 0.496586;
    0.8, -1.42554, 0.44933;
    0.9, -1.5596, 0.406571;
    1, -1.71827, 0.36788
]
# Отобразим решения на графике
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Погрешность
Δ :=
    for i ∈ 0 .. n
        Δ[i, 0] ← |(rungeKut[i, 1] - result[i, 1])/result[i, 1]|*100
        Δ[i, 1] ← |(rungeKut[i, 2] - result[i, 2])/result[i, 2]|*100
    Δ
Δ = [
    0, 0;
    0, 1.22699e-14;
    0, 1.35603e-14;
    0, 1.49864e-14;
    2.03371e-14, 1.65626e-14;
    3.86595e-14, 1.83045e-14;
    3.63377e-14, 2.02295e-14;
    3.38032e-14, 2.23571e-14;
    3.11524e-14, 1.23542e-14;
    4.27119e-14, 1.36535e-14;
    3.87676e-14, 1.50895e-14
]
max(Δ) = 4.27119e-14
