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a := 0.5
b := 1
h := 0.1
n := (b - a)/h = 5
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f(x) := ln(x)/x
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У(x) == Y0(x) + c1*Y1(x) + c2*Y2(x)
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Y1''(x) + 1/x*Y1' - 1/x^2*Y1 == 0
Y2''(x) + 1/x*Y2' - 1/x^2*Y2 == 0
Y0''(x) + 1/x*Y0' - 1/x^2*Y0 == -2/x^3
Y1(a) == 1
Y0(a) == 0
Y2(a) == 0
Y1'(a) == 0
Y0'(a) == 0
Y2'(a) == 1
Y1'(x) == S1(x)
Y0'(x) == S0(x)
Y2'(x) == S2(x)
S1'(x) == -1/x*Y1' + 1/x^2*Y1
S0'(x) == 1/x^2*Y0 - 2/x^3 - 1/x*Y0'
S1'(x) == -1/x*Y2' + 1/x^2*Y2
Y1(a) == 1
Y0(a) == 0
Y2(a) == 0
S1(a) == 0
S0(a) == 0
S2(a) == 1
x :=
    for i ∈ 0 .. n
        x[i] ← a + i*h
    x
x = [0.5; 0.6; 0.7; 0.8; 0.9; 1]
# Метод Рунге-Кутта
Y0'(x, y, z) := z
Y1'(x, y, z) := z
Y2'(x, y, z) := z
S0'(x, y, z) := -2/x^3 - 1/x*z + 1/x^2*y
S1'(x, y, z) := -1/x*z + 1/x^2*y
S2'(x, y, z) := -1/x*z + 1/x^2*y
method0 :=
    y[0] ← 0
    z[0] ← 0
    for i ∈ 0. .. n - 1
        K1[i] ← Y0'(x[i], y[i], z[i])
        L1[i] ← S0'(x[i], y[i], z[i])
        K2[i] ← Y0'(x[i] + h/2, y[i] + h/2*K1[i], z[i] + h/2*L1[i])
        L2[i] ← S0'(x[i] + h/2, y[i] + h/2*K1[i], z[i] + h/2*L1[i])
        K3[i] ← Y0'(x[i] + h/2, y[i] + h/2*K2[i], z[i] + h/2*L2[i])
        L3[i] ← S0'(x[i] + h/2, y[i] + h/2*K2[i], z[i] + h/2*L2[i])
        K4[i] ← Y0'(x[i] + h, y[i] + h*K3[i], z[i] + h*L3[i])
        L4[i] ← S0'(x[i] + h, y[i] + h*K3[i], z[i] + h*L3[i])
        y[i + 1] ← y[i] + h/6*(K1[i] + 2*K2[i] + 2*K3[i] + K4[i])
        z[i + 1] ← z[i] + h/6*(L1[i] + 2*L2[i] + 2*L3[i] + L4[i])
    m[:, 0] ← y
    m[:, 1] ← z
method1 :=
    y[0] ← 1
    z[0] ← 0
    for i ∈ 0 .. n - 1
        K1[i] ← Y1'(x[i], y[i], z[i])
        L1[i] ← S1'(x[i], y[i], z[i])
        K2[i] ← Y1'(x[i] + h/2, y[i] + h/2*K1[i], z[i] + h/2*L1[i])
        L2[i] ← S1'(x[i] + h/2, y[i] + h/2*K1[i], z[i] + h/2*L1[i])
        K3[i] ← Y1'(x[i] + h/2, y[i] + h/2*K2[i], z[i] + h/2*L2[i])
        L3[i] ← S1'(x[i] + h/2, y[i] + h/2*K2[i], z[i] + h/2*L2[i])
        K4[i] ← Y1'(x[i] + h, y[i] + h*K3[i], z[i] + h*L3[i])
        L4[i] ← S1'(x[i] + h, y[i] + h*K3[i], z[i] + h*L3[i])
        y[i + 1] ← y[i] + h/6*(K1[i] + 2*K2[i] + 2*K3[i] + K4[i])
        z[i + 1] ← z[i] + h/6*(L1[i] + 2*L2[i] + 2*L3[i] + L4[i])
    m[:, 2] ← y
    m[:, 3] ← z
method2 :=
    y[0] ← 0
    z[0] ← 1
    for i ∈ 0 .. n - 1
        K1[i] ← Y2'(x[i], y[i], z[i])
        L1[i] ← S2'(x[i], y[i], z[i])
        K2[i] ← Y2'(x[i] + h/2, y[i] + h/2*K1[i], z[i] + h/2*L1[i])
        L2[i] ← S2'(x[i] + h/2, y[i] + h/2*K1[i], z[i] + h/2*L1[i])
        K3[i] ← Y2'(x[i] + h/2, y[i] + h/2*K2[i], z[i] + h/2*L2[i])
        L3[i] ← S2'(x[i] + h/2, y[i] + h/2*K2[i], z[i] + h/2*L2[i])
        K4[i] ← Y2'(x[i] + h, y[i] + h*K3[i], z[i] + h*L3[i])
        L4[i] ← S2'(x[i] + h, y[i] + h*K3[i], z[i] + h*L3[i])
        y[i + 1] ← y[i] + h/6*(K1[i] + 2*K2[i] + 2*K3[i] + K4[i])
        z[i + 1] ← z[i] + h/6*(L1[i] + 2*L2[i] + 2*L3[i] + L4[i])
    m[:, 4] ← y
    m[:, 5] ← z
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# Найдём коэффициенты с
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α[1] := 1
β[1] := 0
γ[1] := -2*ln(2)
α[2] := 1
β[2] := 0
γ[2] := 0
c1 := 1
c2 := 1
Given
α[1]*c1 + β[1]*c2 == γ[1]
α[2]*(method0[n, 0] + c1*method1[n, 2] + c2*method2[n, 4]) + β[2]*(method0[n, 1] + c1*method1[n, 3] + c2*method2[n, 5]) == γ[2]
[c1; c2] := Find(c1, c2) = [-1.38629; 6.77383]
Решение
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chisl := method0[:, 0] + c1*method1[:, 2] + c2*method2[:, 4]
# Численный метод | Точный метод
f(x) = [-1.38629; -0.851376; -0.509536; -0.278929; -0.117067; 0]
chisl = [-1.38629; -0.851504; -0.50966; -0.279017; -0.117111; 0]
Погрешность
# Находим погрешность с помощью точного и численного методов решения
pogreshn :=
    for i ∈ 0 .. n - 1
        Δ[i] ← |(f(x[i]) - chisl[i])/f(x[i])|*100
    Δ
max(pogreshn) = 0.0376372
pogreshn = [1.60171e-14; 0.015076; 0.0244467; 0.0315405; 0.0376372]
f(x1) := ln(x1)/x1
# Построим график
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