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# Григорович Алина, 31 группа, Вариант 6
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a := 0.5
b := 1
h := 0.1
n := (b - a)/h = 5  # выполняется
f(x) := x^2 + 2  # точная функция
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У(x) == Y0(x) + c1*Y1(x) + c2*Y2(x)
# Для нахождения Y0, Y1, Y2 решим 3 вспомогательные задачи Коши
Y1''(x) - 1/x*Y1' - 2*Y1 == 0
Y2''(x) - 1/x*Y2' - 2*Y2 == 0
Y0''(x) - 1/x*Y0' - 2*Y0 == -2*x^2
Y1(a) == 1
Y0(a) == 0
Y2(a) == 0
Y1'(a) == 0
Y0'(a) == 0
Y2'(a) == 1
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Y1'(x) == S1(x)
Y0'(x) == S0(x)
Y2'(x) == S2(x)
S1'(x) == -1/x*Y1' + 2*Y1
S0'(x) == 2*Y0 - 2*x^2 - 1/x*Y0'
S2'(x) == -1/x*Y2' + 2*Y2
Y0(a) == 0
Y1(a) == 1
Y2(a) == 0
S0(a) == 0
S1(a) == 0
S2(a) == 1
x :=
    for i ∈ 0 .. n
        x[i] ← a + i*h
    x
# Метод Рунге-Кутта
Y0'(x, y, z) := z
Y1'(x, y, z) := z
Y2'(x, y, z) := z
S0'(x, y, z) := -2*x^2 - 1/x*z + 2*y
S1'(x, y, z) := -(1/x*z) + 2*y
S2'(x, y, z) := -(1/x*z) + 2*y
method_0 :=
    y[0] ← 0
    z[0] ← 0
    for i ∈ 0. .. n - 1
        K1[i] ← Y0'(x[i], y[i], z[i])
        L1[i] ← S0'(x[i], y[i], z[i])
        K2[i] ← Y0'(x[i] + h/2, y[i] + h/2*K1[i], z[i] + h/2*L1[i])
        L2[i] ← S0'(x[i] + h/2, y[i] + h/2*K1[i], z[i] + h/2*L1[i])
        K3[i] ← Y0'(x[i] + h/2, y[i] + h/2*K2[i], z[i] + h/2*L2[i])
        L3[i] ← S0'(x[i] + h/2, y[i] + h/2*K2[i], z[i] + h/2*L2[i])
        K4[i] ← Y0'(x[i] + h, y[i] + h*K3[i], z[i] + h*L3[i])
        L4[i] ← S0'(x[i] + h, y[i] + h*K3[i], z[i] + h*L3[i])
        y[i + 1] ← y[i] + h/6*(K1[i] + 2*K2[i] + 2*K3[i] + K4[i])
        z[i + 1] ← z[i] + h/6*(L1[i] + 2*L2[i] + 2*L3[i] + L4[i])
    m[:, 0] ← y
    m[:, 1] ← z
method_1 :=
    y[0] ← 1
    z[0] ← 0
    for i ∈ 0 .. n - 1
        K1[i] ← Y1'(x[i], y[i], z[i])
        L1[i] ← S1'(x[i], y[i], z[i])
        K2[i] ← Y1'(x[i] + h/2, y[i] + h/2*K1[i], z[i] + h/2*L1[i])
        L2[i] ← S1'(x[i] + h/2, y[i] + h/2*K1[i], z[i] + h/2*L1[i])
        K3[i] ← Y1'(x[i] + h/2, y[i] + h/2*K2[i], z[i] + h/2*L2[i])
        L3[i] ← S1'(x[i] + h/2, y[i] + h/2*K2[i], z[i] + h/2*L2[i])
        K4[i] ← Y1'(x[i] + h, y[i] + h*K3[i], z[i] + h*L3[i])
        L4[i] ← S1'(x[i] + h, y[i] + h*K3[i], z[i] + h*L3[i])
        y[i + 1] ← y[i] + h/6*(K1[i] + 2*K2[i] + 2*K3[i] + K4[i])
        z[i + 1] ← z[i] + h/6*(L1[i] + 2*L2[i] + 2*L3[i] + L4[i])
    m[:, 2] ← y
    m[:, 3] ← z
method_2 :=
    y[0] ← 0
    z[0] ← 1
    for i ∈ 0 .. n - 1
        K1[i] ← Y2'(x[i], y[i], z[i])
        L1[i] ← S2'(x[i], y[i], z[i])
        K2[i] ← Y2'(x[i] + h/2, y[i] + h/2*K1[i], z[i] + h/2*L1[i])
        L2[i] ← S2'(x[i] + h/2, y[i] + h/2*K1[i], z[i] + h/2*L1[i])
        K3[i] ← Y2'(x[i] + h/2, y[i] + h/2*K2[i], z[i] + h/2*L2[i])
        L3[i] ← S2'(x[i] + h/2, y[i] + h/2*K2[i], z[i] + h/2*L2[i])
        K4[i] ← Y2'(x[i] + h, y[i] + h*K3[i], z[i] + h*L3[i])
        L4[i] ← S2'(x[i] + h, y[i] + h*K3[i], z[i] + h*L3[i])
        y[i + 1] ← y[i] + h/6*(K1[i] + 2*K2[i] + 2*K3[i] + K4[i])
        z[i + 1] ← z[i] + h/6*(L1[i] + 2*L2[i] + 2*L3[i] + L4[i])
    m[:, 4] ← y
    m[:, 5] ← z
# Найдём коэффициенты с
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α[1] := 0
β[1] := 1
γ[1] := 1
α[2] := 1
β[2] := 1
γ[2] := 5
c1 := 1
c2 := 1
Given
α[1]*c1 + β[1]*c2 == γ[1]
α[2]*(method_0[n, 0] + c1*method_1[n, 2] + c2*method_2[n, 4]) + β[2]*(method_0[n, 1] + c1*method_1[n, 3] + c2*method_2[n, 5]) == γ[2]
[c1; c2] := Find(c1, c2) = [2.25; 1]
Решение
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reduc := method_0[:, 0] + c1*method_1[:, 2] + c2*method_2[:, 4]
Погрешность
pogr :=
    for i ∈ 0 .. n
        Δ[i] ← |(f(x[i]) - reduc[i])/f(x[i])|*100
    Δ ← max(Δ[i])
pogr = 7.90625e-5
f(x1) := x1^2 + 2
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