# Метод сеток
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# Условие:
y'' - (1 + x)*y' - y == 2/(1 + x)^3
a := 0
b := 1
# Шаг:
h := 0.1
# Количество разбиений
y(0) == 1
n := (b - a)/h
n = 10
y(1) == 0.5
# Точный Ответ:
y(x) := 1/(1 + x)
# Решение:
p(x) := -(1 + x)
q(x) := -1
f(x) := 2/(1 + x)^3
y'' + p(x)*y' + q(x)*y == f(x)  # коэффициенты:
α1 := 1
β1 := 0
γ1 := 1
y(0) == 1
α2 := 1
β2 := 0
γ2 := 0.5
y(1) == 0.5
# Построим сетку
x :=
    x[0] ← a
    for i ∈ 0 .. n
        x[i] ← x[0] + i*h
    x
x = [0; 0.1; 0.2; 0.3; 0.4; 0.5; 0.6; 0.7; 0.8; 0.9; 1]
i := 0 .. n - 1
a[i] := 1 - h/2*p(x[i])
b[i] := h^2*q(x[i]) - 2
c[i] := 1 + h/2*p(x[i])
d[i] := h^2*f(x[i])
a[i]*y[i - 1] + b[i]*y[i] + c[i]*y[i + 1] == d[i]
(α1 - β1/h)*y[0] + β1/h*y[1] == γ1
(α1 + β2/h)*y[n] - β2/h*y[n - 1] == γ2
a[0] := 0
b[0] := α1 - β1/h
c[0] := β1/h
d[0] := γ1
a[n] := -β2/h
b[n] := α2 + β2/h
c[n] := 0
d[n] := γ2
A[0] := -c[0]/b[0]
B[0] := d[0]/b[0]
# Метод прогонки:
ResProgonki :=
    for k ∈ 1 .. n
        A[k] ← -c[k]/(b[k] + a[k]*A[k - 1])
        B[k] ← (d[k] - a[k]*B[k - 1])/(b[k] + a[k]*A[k - 1])
    ResProgonki[n] ← (d[n] - a[n]*B[n - 1])/(b[n] + a[n]*A[n - 1])
    ResProgonki[0] ← A[0]*ResProgonki[1] + B[0]
    for k ∈ n - 1 .. 1
        ResProgonki[k] ← -c[k]/(b[k] + a[k]*A[k - 1])*ResProgonki[k + 1] + (d[k] - a[k]*B[k - 1])/(b[k] + a[k]*A[k - 1])
    ResProgonki
ResProgonki = [1; 0.909497; 0.833984; 0.770016; 0.715126; 0.6675; 0.625773; 0.588898; 0.556058; 0.526601; 0.5]
# Точное решение исходной задачи:
a := 0
b := 1
Given
d^2/dx^2(y(x)) + p(x)*d/dx(y(x)) + q(x)*y(x) == f(x)
y(0) == 1
y(1) == 0.5
A := Odesolve(x, 1)
toch :=
    for i ∈ 0 .. n - 1
        toch[i] ← A(x[i])
    toch
toch = [1; 0.909091; 0.833334; 0.769231; 0.714286; 0.666666; 0.624999; 0.588232; 0.555551; 0.526309]
# Погрешность:
pogr :=
    for i ∈ 1 .. n - 1
        pogr[i] ← |toch[i] - ResProgonki[i]|/|toch[i]|*100
    pogr
pogr = [0; 0.0446399; 0.0780334; 0.102055; 0.117668; 0.125046; 0.123901; 0.113216; 0.0912898; 0.0554966]
max(pogr) = 0.125046
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